#define LIBRARY_Name="Wood Poles"
#define LIBRARY_Version="0.0"
#define LIBRARY_Author="dchassin"
#define LIBRARY_Description="Wood poles library for California USA"
#define LIBRARY_Module="powerflow"

object pole_configuration
{
	name "WOOD-C-45/5";
	pole_type WOOD;
	pole_length 45 ft;
	pole_depth 4.5 ft;
	ground_diameter (32.5/3.14);
	top_diameter (19/3.14);
	fiber_strength 8000 psi;
	repair_time 1 h;
}
